# Flexible granular chain simulation in LAMMPS

units       si
atom_style hybrid sphere angle
boundary    f f f

special_bonds lj/coul 1.0 1.0 1.0
# special_bonds none

# # Read the atom and bond data from the data file.
################################################
read_data ${data_file}

velocity all set 0.0 0.0 0.0

# Pin the first three beads in space (anchor group) and integrate only the rest
group anchors id 1 2
group mobile subtract all anchors

velocity anchors set 0.0 0.0 0.0
set group anchors omega 0.0 0.0 0.0

include ${lepton_inc}
# Dynamic timestep based on Lepton smoothing width 'w'
# fix 5 all dt/reset 1 ${dt} 1e-04 ${w} units box
# Apply gravity in the standard downward (−z) direction
fix grav mobile gravity 9.81 vector 0 0 -1

group chain_particles type 1
fix 1 chain_particles viscous ${viscosity}

comm_modify vel yes cutoff 0.004

# Use the standard NVE integrator for the mobile beads only.
fix integr mobile nve/sphere

# Set up neighbor list parameters (wider skin and higher per-atom quota prevent overflow)
neighbor 0.004 bin # skin_width type
neigh_modify delay 0 every 1 check yes

# Set a conservative timestep for the stiff bonded chain.
timestep ${dt}

include ${dump_inc}

# Save a binary restart file every 1,000,000 steps
# The '*' is replaced by the timestep number
restart 100000 ${outdir}/restart/restart.*.bin

run ${run_steps}  # 1e7 timesteps 1 second

# Save the final state manually
write_restart ${outdir}/restart/restart.final.bin

variable outdir delete
