# Flexible granular chain simulation in LAMMPS

units       si
atom_style hybrid sphere angle
boundary    f f f

# 1. READ RESTART
# Point this to the specific file you want to resume from
read_restart ${resume_file}

# 3. RE-DEFINE GROUPS (Groups are usually saved, but good practice to ensure)
group anchors id 1 2
group mobile subtract all anchors

include ${lepton_inc}
# Dynamic timestep based on Lepton smoothing width 'w'
# fix 5 all dt/reset 1 ${dt} 1e-04 ${w} units box

# 5. RE-DEFINE FIXES (Not saved in restart)
fix grav mobile gravity 9.81 vector 1 0 0

group chain_particles type 1
fix 1 chain_particles viscous ${viscosity}

comm_modify vel yes cutoff 0.004

# Use the standard NVE integrator for the mobile beads only.
fix integr mobile nve/sphere

# 6. SETTINGS
neighbor 0.004 bin
neigh_modify delay 0 every 1 check yes

# Set a conservative timestep for the stiff bonded chain.
timestep ${dt}

include ${dump_inc}

# Restart settings
restart 100000 ${outdir}/restart/restart.*.bin

# 8. RUN
# Run for another 10 million steps
run ${run_steps}

# Save the final state manually
write_restart ${outdir}/restart/restart.final.bin

variable outdir delete
